// Examples for module tape

// class collector
object collector:0 {

	// header properties
	rank 0;
	clock (invalid);
	flags NONE;
	// collector properties
	property "";
	trigger "";
	file "";
	limit 0;
	group "";
	flush 0;
	interval +0 s;
}


// class group_recorder
object group_recorder:0 {

	// header properties
	rank 0;
	clock (invalid);
	flags NONE;
	// group_recorder properties
	file "";
	group "";
	interval +0 s;
	flush_interval +0 s;
	strict FALSE;
	print_units FALSE;
	property "";
	limit 0;
	complex_part NONE;
}


// class histogram
object histogram:0 {

	// header properties
	rank 0;
	clock (invalid);
	flags NONE;
	// histogram properties
	filename "";
	filetype "";
	mode "";
	group "";
	bins "";
	property "";
	min +0;
	max +0;
	samplerate +0 s;
	countrate +0 s;
	bin_count 0;
	limit 0;
}


// class multi_recorder
object multi_recorder:0 {

	// header properties
	rank 0;
	clock (invalid);
	flags NONE;
	// multi_recorder properties
	interval +0 s;
	property "";
	trigger "";
	file "";
	filetype "";
	mode "";
	multifile "";
	limit 0;
	plotcommands "";
	xdata "";
	columns "";
	output SCREEN;
	header_units DEFAULT;
	line_units DEFAULT;
}


// class player
object player:0 {

	// header properties
	rank 0;
	clock (invalid);
	flags NONE;
	// player properties
	property "";
	file "";
	filetype "";
	mode "";
	loop 0;
}

Segmentation fault

// class recorder
object recorder:0 {

	// header properties
	rank 0;
	clock (invalid);
	flags NONE;
	// recorder properties
	property "";
	trigger "";
	file "";
	filetype "";
	mode "";
	multifile "";
	limit 0;
	plotcommands "";
	xdata "";
	columns "";
	flush 0;
	interval +0 s;
	output SCREEN;
	header_units DEFAULT;
	line_units DEFAULT;
}


// class shaper
object shaper:0 {

	// header properties
	rank 0;
	clock (invalid);
	flags NONE;
	// shaper properties
	file "";
	filetype "";
	mode "";
	group "";
	property "";
	magnitude +0;
	events +0;
}

Segmentation fault

// class violation_recorder
object violation_recorder:0 {

	// header properties
	rank 0;
	clock (invalid);
	flags NONE;
	// violation_recorder properties
	file violation_recorder-violation-log.csv;
	summary violation_recorder-violation-summary.csv;
	virtual_substation "";
	interval +0 s;
	flush_interval +0 s;
	strict FALSE;
	echo FALSE;
	limit 0;
	violation_delay 0;
	xfrmr_thermal_limit_upper +0;
	xfrmr_thermal_limit_lower +0;
	line_thermal_limit_upper +0;
	line_thermal_limit_lower +0;
	node_instantaneous_voltage_limit_upper +0;
	node_instantaneous_voltage_limit_lower +0;
	node_continuous_voltage_limit_upper +0;
	node_continuous_voltage_limit_lower +0;
	node_continuous_voltage_interval +0;
	secondary_dist_voltage_rise_upper_limit +0;
	secondary_dist_voltage_rise_lower_limit +0;
	substation_breaker_A_limit +0;
	substation_breaker_B_limit +0;
	substation_breaker_C_limit +0;
	substation_pf_lower_limit +0;
	inverter_v_chng_per_interval_upper_bound +0;
	inverter_v_chng_per_interval_lower_bound +0;
	inverter_v_chng_interval +0;
	violation_flag VIOLATION0;
}
